εε8 := 10^-8
εεε9 := 10^-9
TOL = 0.001
TOL := 10^-11
MuS := 132712440018
AU := 149597870.691*km
fM := 1.32712440018*10^11*km^3/sec^2
fME := 398600*km^3/sec^2  # disabled
Re := 6371*km  # disabled
RSun := 696000*km
RSun/AU = 0.00465247
UnitR := AU
UnitV := sqrt(fM/UnitR)
UnitT := UnitR/UnitV
UnitAcc := UnitV/UnitT
JDf(YYYY, MM, Dddd) :=
    y ←
        YYYY if MM > 2.5
        YYYY - 1 otherwise
    mM ←
        MM if MM > 2.5
        MM + 12 otherwise
    A ← floor(y/100)
    B ← 2 - A + floor(A/4)
    yyyymmdddd ← YYYY + MM/100 + Dddd/10000
    c ←
        0 if yyyymmdddd < 1582.1015
        B otherwise
    floor(365.25*y) + floor(30.6001*(mM + 1)) + Dddd + 1720994.5 + c
YyyyMmDd(JD) :=
    Z ← floor(JD + 0.5)
    F ← JD + 0.5 - floor(JD + 0.5)
    Aα ←
        Z if Z < 2299161
        Z + 1 + floor((Z - 1867216.25)/36524.25) - floor(floor((Z - 1867216.25)/36524.25)/4) otherwise
    Bβ ← Aα + 1524
    Cc ← floor((Bβ - 122.1)/365.25)
    Dd ← floor(365.25*Cc)
    Ee ← floor((Bβ - Dd)/30.6001)
    Dddd ← Bβ - Dd - floor(30.6001*Ee) + F
    mM ←
        Ee - 1 if Ee < 13.5
        Ee - 13 otherwise
    YYYy ←
        Cc - 4716 if mM > 2.5
        Cc - 4715 otherwise
    [YYYy; mM; Dddd]
B123(Ω, i, ω) := [
    cos(ω)*cos(Ω) - sin(ω)*cos(i)*sin(Ω), -sin(ω)*cos(Ω) - cos(ω)*cos(i)*sin(Ω), sin(i)*sin(Ω);
    cos(ω)*sin(Ω) + sin(ω)*cos(i)*cos(Ω), -sin(ω)*sin(Ω) + cos(ω)*cos(i)*cos(Ω), -sin(i)*cos(Ω);
    sin(ω)*sin(i), cos(ω)*sin(i), cos(i)
]
B123(Ω, i, ω) := transpose(B123(Ω, i, ω))
# [component: outputs epfiEarth]
# [component: outputs epfiJupiter]
vectorVelocity(JD, ephmatrix) :=
    JD1 ← ephmatrix[0, 0]
    JD2 ← ephmatrix[0, 1]
    if (JD ≥ JD1)*(JD ≤ JD2)
        dt ← ephmatrix[0, 2]
        n ← ephmatrix[0, 3] - 1
        temp ← (JD - JD1)/dt
        nBlock ← floor(temp)
        t ← temp - nBlock
        f[3] ← 0
        for ncoord ∈ 0 .. 2
            nString ← nBlock*3 + 1 + ncoord
            for i ∈ 0 .. n
                a[i] ← ephmatrix[nString, i]
            f[ncoord] ← n*a[n]*t + (n - 1)*a[n - 1]
            j ← n - 2
            while j > 0
                f[ncoord] ← f[ncoord]*t + j*a[j]
                j ← j - 1
        f ← f/dt
        f
    [0; 0; 0; 1] otherwise
vectorPosition(JD, ephmatrix) :=
    JD1 ← ephmatrix[0, 0]
    JD2 ← ephmatrix[0, 1]
    if (JD ≥ JD1)*(JD ≤ JD2)
        dt ← ephmatrix[0, 2]
        n ← ephmatrix[0, 3] - 1
        temp ← (JD - JD1)/dt
        nBlock ← floor(temp)
        t ← temp - nBlock
        f[3] ← 0
        for ncoord ∈ 0 .. 2
            nString ← nBlock*3 + 1 + ncoord
            for i ∈ 0 .. n
                a[i] ← ephmatrix[nString, i]
            f[ncoord] ← a[n]*t + a[n - 1]
            j ← n - 2
            while j > -1
                f[ncoord] ← f[ncoord]*t + a[j]
                j ← j - 1
        f
    [0; 0; 0; 1] otherwise
vectorVelocity(JD, ephmatrix) :=
    JD1 ← ephmatrix[0, 0]
    JD2 ← ephmatrix[0, 1]
    if (JD ≥ JD1)*(JD ≤ JD2)
        dt ← ephmatrix[0, 2]
        n ← ephmatrix[0, 3] - 1
        temp ← (JD - JD1)/dt
        nBlock ← floor(temp)
        t ← temp - nBlock
        f[3] ← 0
        for ncoord ∈ 0 .. 2
            nString ← nBlock*3 + 1 + ncoord
            for i ∈ 0 .. n
                a[i] ← ephmatrix[nString, i]
            f[ncoord] ← n*a[n]*t + (n - 1)*a[n - 1]
            j ← n - 2
            while j > 0
                f[ncoord] ← f[ncoord]*t + j*a[j]
                j ← j - 1
        f ← f/dt
        f
    [0; 0; 0; 1] otherwise
rEarthfun(JD) := vectorPosition(JD, epfiEarth)
rJupiterfun(JD) := vectorPosition(JD, epfiJupiter)
VEarthfun(JD) := vectorVelocity(JD, epfiEarth)
VJupiterfun(JD) := vectorVelocity(JD, epfiJupiter)
km_AU := km/AU
km_dayUnitV := km/(day*UnitV)
day_UnitT := day/UnitT
VEarthfun(JDf(2023, 7, 14))*km/day = [27.3338; 10.5648; -0.00155941; 0] km/s
vearth := [VEarthfun(JDf(2023, 7, 14))[0]; VEarthfun(JDf(2023, 7, 14))[1]; VEarthfun(JDf(2023, 7, 14))[2]]
vearth*km/day = [27333.8; 10564.8; -1.55941] m/s
rearth := [rEarthfun(JDf(2023, 7, 14))[0]; rEarthfun(JDf(2023, 7, 14))[1]; rEarthfun(JDf(2023, 7, 14))[2]]
rearth = [54535897; -141961127; 6905.27]
rEarthfun(JDf(2023, 7, 14)) = [54535897; -141961127; 6905.27; 0]
re := |rearth|
re = 152076052
vjup := [
    VJupiterfun(JDf(2023, 7, 14) + 837)[0];
    VJupiterfun(JDf(2023, 7, 14) + 837)[1];
    VJupiterfun(JDf(2023, 7, 14) + 837)[2]
]
vjup*km/day = [-12864.7; -2455.71; 298.027] m/s
VJupiterfun(JDf(2023, 7, 14) + 837)*km/day = [-12.8647; -2.45571; 0.298027; 0] km/s
rjup := [
    rJupiterfun(JDf(2023, 7, 14) + 837)[0];
    rJupiterfun(JDf(2023, 7, 14) + 837)[1];
    rJupiterfun(JDf(2023, 7, 14) + 837)[2]
]
rjup = [-182089828; 754483820; 939906]
rj := |rjup|
rj = 776146522
rJupiterfun(JDf(2023, 7, 14) + 837) = [-182089828; 754483820; 939906; 0]
rearth×rjup = [-1.3864e14; -5.2516e13; 1.52968e16]
EJ := rearth×rjup
σ := EJ*1/|EJ|
σ = [-0.00906293; -0.00343298; 0.999953]
fi := acos(rearth*rjup/(re*rj))
fi = 3.01162
i := acos(σ[2])*180/π
i = 0.555281
Ω0 := 360 + atan(-σ[0]/σ[1])*180/π
Ω0 = 290.746
t_lamb :=
    t_lamb ← 0
    θ ← 0
    exs ← 0
    for θ ∈ 0 .. 66*180/π
        e ← ((rj - re)/re)/(cos(θ) - rj*exs*cos(θ + fi)/re)
        p ← re*(1 + cos(θ)*exs)
        E0 ← 2*atan(sqrt((1 - exs)/(1 + exs))*tan(θ)) if exs < 1
        E0 ← 2*atanh(sqrt((exs - 1)/(1 + exs))*tan(θ)) if exs > 1
        Ek ← 2*atan(sqrt((1 - exs)/(1 + exs))*tan(θ + fi)) if exs < 1
        Ek ← 2*atanh(sqrt((exs - 1)/(1 + exs))*tan(θ + fi)) if exs < 1
        a ← p/(exs^2 - 1) if exs > 1
        a ← p/(1 - exs^2) if exs < 1
        n ← sqrt(|a^3|/MuS)
        tlamb ← Ek - E0 - exs*cos(Ek) + exs*sin(E0)
    t_lamb ← tlamb
    = 2.95511 + 3.06814i
rj = 776146522
re = 152076052
θ := 1.147711
exs := 1.327455
t_lamb = 2.95511 + 3.06814i
exs := ((rj - re)/re)/(cos(θ) - rj*exs*cos(θ + fi)/re)
ex
p := re*(1 + cos(θ)*exs)
p = 216627702
# 234957422,150824
u := 0.268448*π/180
B123(Ω, i, u) := 1/B123(Ω, i, u)
B123(Ω0*π/180, i*π/180, u) = [
    0.358609, 0.933444, -0.00906293;
    -0.933488, 0.358593, -0.00343298;
    4.54067e-5, 0.00969123, 0.999953
]
