TOL = 0.001
TOL := 10^-11
AU := 149597870.691*km
fM := 1.32712440018*10^11*km^3/sec^2
εε8 := 10^-8
εεε9 := 10^-9
fME := 398600*km^3/sec^2  # disabled
Re := 6371*km  # disabled
RSun := 696000*km
RSun/AU = 0.00465247
UnitR := AU
UnitV := sqrt(fM/UnitR)
UnitT := UnitR/UnitV
UnitAcc := UnitV/UnitT
JDf(YYYY, MM, Dddd) :=
    y ←
        YYYY if MM > 2.5
        YYYY - 1 otherwise
    mM ←
        MM if MM > 2.5
        MM + 12 otherwise
    A ← floor(y/100)
    B ← 2 - A + floor(A/4)
    yyyymmdddd ← YYYY + MM/100 + Dddd/10000
    c ←
        0 if yyyymmdddd < 1582.1015
        B otherwise
    floor(365.25*y) + floor(30.6001*(mM + 1)) + Dddd + 1720994.5 + c
YyyyMmDd(JD) :=
    Z ← floor(JD + 0.5)
    F ← JD + 0.5 - floor(JD + 0.5)
    Aα ←
        Z if Z < 2299161
        Z + 1 + floor((Z - 1867216.25)/36524.25) - floor(floor((Z - 1867216.25)/36524.25)/4) otherwise
    Bβ ← Aα + 1524
    Cc ← floor((Bβ - 122.1)/365.25)
    Dd ← floor(365.25*Cc)
    Ee ← floor((Bβ - Dd)/30.6001)
    Dddd ← Bβ - Dd - floor(30.6001*Ee) + F
    mM ←
        Ee - 1 if Ee < 13.5
        Ee - 13 otherwise
    YYYy ←
        Cc - 4716 if mM > 2.5
        Cc - 4715 otherwise
    [YYYy; mM; Dddd]
B123(Ω, i, ω) := [
    cos(ω)*cos(Ω) - sin(ω)*cos(i)*sin(Ω), -sin(ω)*cos(Ω) - cos(ω)*cos(i)*sin(Ω), sin(i)*sin(Ω);
    cos(ω)*sin(Ω) + sin(ω)*cos(i)*cos(Ω), -sin(ω)*sin(Ω) + cos(ω)*cos(i)*cos(Ω), -sin(i)*cos(Ω);
    sin(ω)*sin(i), cos(ω)*sin(i), cos(i)
]
# [component: outputs epfiJupiter]
# [component: outputs epfiMars]
# [component: outputs epfiVenus]
# [component: outputs epfiEarth]
epfi3[0, 0] =  # error: Эта переменная не определена.
epfi3[0, 1] =  # error
epfi2[0, 0] =  # error
epfi2[0, 1] =  # error
vectorPosition(JD, ephmatrix) :=
    JD1 ← ephmatrix[0, 0]
    JD2 ← ephmatrix[0, 1]
    if (JD ≥ JD1)*(JD ≤ JD2)
        dt ← ephmatrix[0, 2]
        n ← ephmatrix[0, 3] - 1
        temp ← (JD - JD1)/dt
        nBlock ← floor(temp)
        t ← temp - nBlock
        f[3] ← 0
        for ncoord ∈ 0 .. 2
            nString ← nBlock*3 + 1 + ncoord
            for i ∈ 0 .. n
                a[i] ← ephmatrix[nString, i]
            f[ncoord] ← a[n]*t + a[n - 1]
            j ← n - 2
            while j > -1
                f[ncoord] ← f[ncoord]*t + a[j]
                j ← j - 1
        f
    [0; 0; 0; 1] otherwise
vectorVelocity(JD, ephmatrix) :=
    JD1 ← ephmatrix[0, 0]
    JD2 ← ephmatrix[0, 1]
    if (JD ≥ JD1)*(JD ≤ JD2)
        dt ← ephmatrix[0, 2]
        n ← ephmatrix[0, 3] - 1
        temp ← (JD - JD1)/dt
        nBlock ← floor(temp)
        t ← temp - nBlock
        f[3] ← 0
        for ncoord ∈ 0 .. 2
            nString ← nBlock*3 + 1 + ncoord
            for i ∈ 0 .. n
                a[i] ← ephmatrix[nString, i]
            f[ncoord] ← n*a[n]*t + (n - 1)*a[n - 1]
            j ← n - 2
            while j > 0
                f[ncoord] ← f[ncoord]*t + j*a[j]
                j ← j - 1
        f ← f/dt
        f
    [0; 0; 0; 1] otherwise
rEarthfun(JD) := vectorPosition(JD, epfiEarth)
rMarsfun(JD) := vectorPosition(JD, epfiMars)
rVenusfun(JD) := vectorPosition(JD, epfiVenus)
rVenusfun(JDf(2023, 7, 14)) =  # error
rEarthfun(JDf(2023, 7, 14)) = [54535897; -141961127; 6905.27; 0]
rJupiterfun(JD) := vectorPosition(JD, epfiJupiter)
rJupiterfun(JDf(2023, 7, 14) + 837) = [-182089828; 754483820; 939906; 0]
VEarthfun(JD) := vectorVelocity(JD, epfiEarth)
VVenusfun(JD) := vectorVelocity(JD, epfiVenus)
VMarsfun(JD) := vectorVelocity(JD, epfiMars)
VJupiterfun(JD) := vectorVelocity(JD, epfiJupiter)
VEarthfun(JDf(2023, 7, 14))*km/day = [27.3338; 10.5648; -0.00155941; 0] km/s
VJupiterfun(JDf(2023, 7, 14) + 837)*km/day = [-12.8647; -2.45571; 0.298027; 0] km/s
km_AU := km/AU
km_dayUnitV := km/(day*UnitV)
day_UnitT := day/UnitT
r2fun(JDf(2023, 07, 14)) =  # error
r2fun(JDf(2025, 8, 8))*km/AU =  # error
V2fun(JDf(2023, 7, 14))*km/day =  # error
r2fun(JDf(2025, 8, 8))*km/AU =  # error
r5fun(JD) := vectorPosition(JD, epfi3)
V5fun(JD) := vectorVelocity(JD, epfi3)
