eps := 23.44*π/180
a := 268.057*π/180
b := 64.496*π/180
A1 := [1, 0, 0; 0, cos(eps), -sin(eps); 0, sin(eps), cos(eps)]
V1 := [5.004294; 3.056605; -0.367209]
A2 := [-sin(a), cos(a), 0; -cos(a), -sin(a), 0; 0, 0, 1]
A4 := [cos(a), sin(a), 0; -sin(a), cos(a), 0; 0, 0, 1]
A3 := [1, 0, 0; 0, sin(b), cos(b); 0, -cos(b), sin(b)]
B1 := A3*V1 = [5.00429; 2.60064; -1.64752]
C123 := A1*A2*A3 = [0.999425, -0.0306014, -0.0145987; 0.0311073, 0.998875, 0.0357887; 0.0134871, -0.0362222, 0.999253]
C1 := A1*V1 = [5.00429; 2.95044; 0.878976]
P2 := A3*A4*A1*V1 = [-3.11841; 4.80223; -1.31708]
B2 := A2*B1 = [4.91324; 2.76882; -1.64752]
C2 := A2*C1 = [4.90138; 3.11841; 0.878976]
C321 := A3*A2*A1 = [0.999425, -0.0311073, 0.0134871; 0.0306014, 0.998875, 0.0362222; -0.0145987, -0.0357887, 0.999253]
B3 := A1*B2 = [4.91324; 3.19569; -0.410158]
C3 := A3*C2 = [4.90138; 3.193; -0.549383]
V123 := C123*V1 = [4.91324; 3.19569; -0.410158]
V321 := C321*V1 = [4.90138; 3.193; -0.549383]
